dpi := 360
dpmm := dpi/25.4 = 14.1732
dpmm := 4  # disabled
1/dpmm = 0.25  # disabled
Wmm := 25.4*20 = 508
Hmm := 25.4*10 = 254
3600/6 = 600
Wpx := 1920  # disabled
Wpx := Wmm*dpmm = 7200
Wmm/0.5 = 1016
Hpx := 1080  # disabled
Hpx := Hmm*dpmm = 3600
Hmm/0.5 = 508
Wpx/Wmm = 14.1732
# Коррекция вывода печати
Wpx' := 5600
Hpx' := 5292
dpmma := Wmm*x == Wpx' solve, x → 1400/127
dpmmb := Hmm*x == Hpx' solve, x → 2646/127 = 20.8346
Wpx'*x == Wpx solve, x → 1.28571428571
Hpx'*x == Hpx solve, x → 0.680272108844 = 0.680272
Wpx/Wpx' = 1.28571
Wpx'/Wpx = 0.777778
Wmm/Wpx' = 0.0907143
Wpx'/Wmm = 11.0236
Hpx/Hpx' = 0.680272
Hpx'/Hpx = 1.47
Hmm/Hpx' = 0.047997
Hpx'/Hmm = 20.8346
Wpx'/Hpx' = 1.0582
Hpx'/Wpx' = 0.945
1/dpmma = 0.0907143
1/dpmmb = 0.047997
1400*6200*x == 822 solve, x → 411/4340000
1400*x*411/4340000 == 1000 solve, x → 3100000/411 = 7542.58
